# OpenSim document version 40500
Model CG_full_sts_no_arm_1_osimGRF-True-s8_LaiUhlrich2022_scaled:
  gravity: 0 -9.80665 0
  length_units: meters
  force_units: N
  credits:
    Rajagopal et al. (2016), Lai et al. (2017), Uhlrich et al. (2022)
  publications:
    Rajagopal, A., Dembia, C.L., DeMers, M.S., Delp, D.D., Hicks, J.L., Delp, S.L. (2016) Full-body musculoskeletal model for muscle-driven simulation of human gait. IEEE Transactions on Biomedical Engineering.
  Ground
  BodySet:
    Body pelvis: mass=9.692103 [kg] mass_center=(-0.07874409 0 0) inertia=(0.1423896 0.1423896 0.05910973 0 0 0)
        meshes=(r_pelvis.vtp l_pelvis.vtp sacrum.vtp)
      WrapCylinder Gmax1_at_pelvis_r: xyz_body_rotation=(-0.6 0.45 0) translation=(-0.08576089 -0.110264 0.08311593)
          quadrant=-x radius=0.04695161 length=0.1885919
      WrapCylinder Gmax2_at_pelvis_r: xyz_body_rotation=(-0.75 0.39 0) translation=(-0.08910222 -0.09244355 0.09265382)
          quadrant=all radius=0.04741182 length=0.1233956
      WrapCylinder Gmax3_at_pelvis_r: xyz_body_rotation=(-0.1 0 0) translation=(-0.09244355 -0.09801244 0.09265382)
          quadrant=all radius=0.04460617 length=0.1360301
      WrapCylinder Gmax1_at_pelvis_l: xyz_body_rotation=(0.6 -0.45 0) translation=(-0.08576089 -0.110264 -0.08311593)
          quadrant=-x radius=0.04695161 length=0.1885919
      WrapCylinder Gmax2_at_pelvis_l: xyz_body_rotation=(0.75 -0.39 0)
          translation=(-0.08910222 -0.09244355 -0.09265382) quadrant=all radius=0.04741182 length=0.1233956
      WrapCylinder Gmax3_at_pelvis_l: xyz_body_rotation=(0.1 0 0) translation=(-0.09244355 -0.09801244 -0.09265382)
          quadrant=all radius=0.04460617 length=0.1360301
      WrapCylinder PS_at_brim_r: xyz_body_rotation=(-0.25 -0.27 0.1) translation=(-0.08241955 -0.06682667 0.08938369)
          quadrant=-y radius=0.0565668 length=0.1333306
      WrapCylinder PS_at_brim_l: xyz_body_rotation=(0.25 0.27 0.1) translation=(-0.08241955 -0.06682667 -0.08938369)
          quadrant=-y radius=0.0565668 length=0.1333306
      WrapCylinder IL_at_brim_r: xyz_body_rotation=(-0.32 -0.24 0.9) translation=(-0.07907822 -0.07239555 0.1030092)
          quadrant=-y radius=0.06226648 length=0.1328245
      WrapCylinder IL_at_brim_l: xyz_body_rotation=(0.32 0.24 0.9) translation=(-0.07907822 -0.07239555 -0.1030092)
          quadrant=-y radius=0.06226648 length=0.1328245
    Body femur_r: mass=7.654762 mass_center=(0 -0.1638326 0) inertia=(0.102345 0.02682831 0.1079247 0 0 0)
        meshes=r_femur.vtp
      WrapCylinder GasLat_at_condyles_r: translation=(0.004818606 -0.3951257 0) quadrant=all radius=0.02505675
          length=0.09637213
      WrapCylinder GasMed_at_condyles_r: translation=(0.004818606 -0.3951257 0) quadrant=all radius=0.02409303
          length=0.09637213
      WrapCylinder KnExt_at_fem_r: xyz_body_rotation=(-0.0623366 0.0507601 0)
          translation=(0.003458102 -0.3881214 0.002015247) quadrant=all radius=0.02409303 length=0.09637213
      WrapCylinder KnExtVL_at_fem_r: xyz_body_rotation=(-0.0623366 0.0507601 0)
          translation=(0.001819776 -0.3881214 0.002015247) quadrant=all radius=0.02409303 length=0.09637213
      WrapCylinder AB_at_femshaft_r: xyz_body_rotation=(1.66157 0.186644 0)
          translation=(0.01411216 -0.1085102 0.02251735) quadrant=all radius=0.0159014 length=0.06746049
      WrapCylinder AL_at_femshaft_r: xyz_body_rotation=(1.77711 0.136489 0)
          translation=(0.02961776 -0.2234956 0.01456539) quadrant=all radius=0.0193708 length=0.09637213
      WrapCylinder AMprox_at_femshaft_r: xyz_body_rotation=(1.61126 0.18656 0)
          translation=(0.004994958 -0.07025027 0.02448141) quadrant=all radius=0.02033452 length=0.06746049
      WrapCylinder AMmid_at_femshaft_r: xyz_body_rotation=(1.61139 0.13656 0)
          translation=(0.02217764 -0.1548806 0.01983743) quadrant=all radius=0.02062364 length=0.1156466
      WrapCylinder AMdist_at_femshaft_r: xyz_body_rotation=(1.71188 0.186636 0)
          translation=(0.03045986 -0.2512768 0.009024864) quadrant=all radius=0.02100912 length=0.1927443
      WrapCylinder AMisch_at_condyles_r: xyz_body_rotation=(1.71115 -0.463363 0)
          translation=(-0.02182935 -0.3631601 -0.003039933) quadrant=all radius=0.03854885 length=0.2312931
      WrapCylinder PECT_at_femshaft_r: xyz_body_rotation=(1.81295 0.276344 0)
          translation=(0.005864947 -0.08143724 0.02933616) quadrant=all radius=0.01445582 length=0.04818606
    Body tibia_r: mass=3.051157 mass_center=(0 -0.1821415 0) inertia=(0.0394769 0.003994687 0.04002519 0 0 0)
        meshes=(r_tibia.vtp r_fibula.vtp)
      WrapCylinder GasLat_at_shank_r: xyz_body_rotation=(2.96723 -0.279725 -1.47812)
          translation=(-0.00721932 -0.0721932 -0.003219427) quadrant=-y radius=0.05365711 length=0.09755838
      WrapCylinder GasMed_at_shank_r: xyz_body_rotation=(2.96723 0.0279725 -1.47812)
          translation=(-0.00721932 -0.0721932 -0.003219427) quadrant=-y radius=0.05755945 length=0.09755838
      WrapCylinder GR_at_condyles_r: xyz_body_rotation=(0 -0.4 0) translation=(-0.002926751 -0.01951168 0) quadrant=all
          radius=0.03512102 length=0.09755838
      WrapCylinder SM_at_condyles_r: xyz_body_rotation=(0 -0.1 0) translation=(-0.0009755838 -0.01951168 0)
          quadrant=all radius=0.03365764 length=0.09755838
      WrapCylinder ST_at_condyles_r: xyz_body_rotation=(0 -0.2 0) translation=(-0.001951168 -0.01999947 0) quadrant=all
          radius=0.04146231 length=0.09755838
      WrapCylinder BF_at_gastroc_r: translation=(-0.03804777 -0.05853503 0) quadrant=y radius=0.02829193
          length=0.1463376
    Body patella_r: mass=0.07093991 mass_center=(0.001734698 0.02544224 0)
        inertia=(2.193654e-6 1.002049e-5 1.002049e-5 0 0 0) meshes=r_patella.vtp
    Body talus_r: mass=0.08229688 mass_center=(0 0 0) inertia=(0.0006779373 0.0006779373 0.0006779373 0 0 0)
        meshes=r_talus.vtp
    Body calcn_r: mass=1.028711 mass_center=(0.0907618 0.02722854 0)
        inertia=(0.0009491122 0.002643955 0.002779543 0 0 0) meshes=r_foot.vtp
    Body toes_r: mass=0.178255 mass_center=(0.03140358 0.005445708 -0.01588331)
        inertia=(6.779373e-5 0.0001355875 0.0006779373 0 0 0) meshes=r_bofoot.vtp
    Body femur_l: mass=7.654762 mass_center=(0 -0.1643558 0) inertia=(0.1029998 0.02699995 0.1086152 0 0 0)
        meshes=l_femur.vtp
      WrapCylinder GasLat_at_condyles_l: translation=(0.004833996 -0.3963876 0) quadrant=all radius=0.02513678
          length=0.09667991
      WrapCylinder GasMed_at_condyles_l: translation=(0.004833996 -0.3963876 0) quadrant=all radius=0.02416998
          length=0.09667991
      WrapCylinder KnExt_at_fem_l: xyz_body_rotation=(0.0623366 -0.0507601 0)
          translation=(0.003469146 -0.3893609 -0.002021683) quadrant=all radius=0.02416998 length=0.09667991
      WrapCylinder KnExtVL_at_fem_l: xyz_body_rotation=(0.0623366 -0.0507601 0)
          translation=(0.001825587 -0.3893609 -0.002021683) quadrant=all radius=0.02416998 length=0.09667991
      WrapCylinder AB_at_femshaft_l: xyz_body_rotation=(-1.66157 -0.186644 0)
          translation=(0.01415723 -0.1088567 -0.02258926) quadrant=all radius=0.01595219 length=0.06767594
      WrapCylinder AL_at_femshaft_l: xyz_body_rotation=(-1.77711 -0.136489 0)
          translation=(0.02971235 -0.2242094 -0.01461191) quadrant=all radius=0.01943266 length=0.09667991
      WrapCylinder AMprox_at_femshaft_l: xyz_body_rotation=(-1.61126 -0.18656 0)
          translation=(0.00501091 -0.07047463 -0.0245596) quadrant=all radius=0.02039946 length=0.06767594
      WrapCylinder AMmid_at_femshaft_l: xyz_body_rotation=(-1.61139 -0.13656 0)
          translation=(0.02224846 -0.1553753 -0.01990079) quadrant=all radius=0.0206895 length=0.1160159
      WrapCylinder AMdist_at_femshaft_l: xyz_body_rotation=(-1.71188 -0.186636 0)
          translation=(0.03055714 -0.2520793 -0.009053687) quadrant=all radius=0.02107622 length=0.1933598
      WrapCylinder AMisch_at_condyles_l: xyz_body_rotation=(-1.71115 0.463363 0)
          translation=(-0.02189906 -0.3643199 0.003049642) quadrant=all radius=0.03867196 length=0.2320318
      WrapCylinder PECT_at_femshaft_l: xyz_body_rotation=(-1.81295 -0.276344 0)
          translation=(0.005883678 -0.08169733 -0.02942985) quadrant=all radius=0.01450199 length=0.04833996
    Body tibia_l: mass=3.051157 mass_center=(0 -0.1784727 0) inertia=(0.03790259 0.003835381 0.03842901 0 0 0)
        meshes=(l_tibia.vtp l_fibula.vtp)
      WrapCylinder GasLat_at_shank_l: xyz_body_rotation=(-2.96723 0.279725 -1.47812)
          translation=(-0.007073905 -0.07073905 0.003154579) quadrant=-y radius=0.05257632 length=0.09559331
      WrapCylinder GasMed_at_shank_l: xyz_body_rotation=(-2.96723 -0.0279725 -1.47812)
          translation=(-0.007073905 -0.07073905 0.003154579) quadrant=-y radius=0.05640005 length=0.09559331
      WrapCylinder GR_at_condyles_l: xyz_body_rotation=(0 0.4 0) translation=(-0.002867799 -0.01911866 0) quadrant=all
          radius=0.03441359 length=0.09559331
      WrapCylinder SM_at_condyles_l: xyz_body_rotation=(0 0.1 0) translation=(-0.0009559331 -0.01911866 0) quadrant=all
          radius=0.03297969 length=0.09559331
      WrapCylinder ST_at_condyles_l: xyz_body_rotation=(0 0.2 0) translation=(-0.001911866 -0.01959663 0) quadrant=all
          radius=0.04062716 length=0.09559331
      WrapCylinder BF_at_gastroc_l: translation=(-0.03728139 -0.05735598 0) quadrant=all radius=0.02772206
          length=0.14339
    Body patella_l: mass=0.07093991 mass_center=(0.001740238 0.0255235 0)
        inertia=(2.207688e-6 1.00846e-5 1.00846e-5 0 0 0) meshes=l_patella.vtp
    Body talus_l: mass=0.08229688 mass_center=(0 0 0) inertia=(0.0006779373 0.0006779373 0.0006779373 0 0 0)
        meshes=l_talus.vtp
    Body calcn_l: mass=1.028711 mass_center=(0.0907618 0.02722854 0)
        inertia=(0.0009491122 0.002643955 0.002779543 0 0 0) meshes=l_foot.vtp
    Body toes_l: mass=0.178255 mass_center=(0.03140358 0.005445708 0.01588331)
        inertia=(6.779373e-5 0.0001355875 0.0006779373 0 0 0) meshes=l_bofoot.vtp
    Body torso: mass=22.07745 mass_center=(-0.02767783 0.2952302 0) inertia=(1.086425 0.6363158 1.086425 0 0 0)
        meshes=(hat_spine.vtp hat_jaw.vtp hat_skull.vtp hat_ribs_scap.vtp)
    Body humerus_r: mass=1.672684 mass_center=(0 -0.1592328 0) inertia=(0.009211462 0.003177669 0.01033957 0 0 0)
        meshes=humerus_rv.vtp
    Body ulna_r: mass=0.4999535 mass_center=(0 -0.115861 0) inertia=(0.002252624 0.0004699938 0.002443512 0 0 0)
        meshes=ulna_rv.vtp
    Body radius_r: mass=0.4999535 mass_center=(0 -0.115861 0) inertia=(0.002252624 0.0004699938 0.002443512 0 0 0)
        meshes=radius_rv.vtp
    Body hand_r: mass=0.3765082 mass_center=(0 -0.06545991 0) inertia=(0.000678373 0.0004159978 0.00101908 0 0 0)
        meshes=(pisiform_rvs.vtp lunate_rvs.vtp scaphoid_rvs.vtp triquetrum_rvs.vtp hamate_rvs.vtp capitate_rvs.vtp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)
    Body humerus_l: mass=1.672684 mass_center=(0 -0.1592328 0) inertia=(0.009211462 0.003177669 0.01033957 0 0 0)
        meshes=humerus_lv.vtp
    Body ulna_l: mass=0.4999535 mass_center=(0 -0.115861 0) inertia=(0.002252624 0.0004699938 0.002443512 0 0 0)
        meshes=ulna_lv.vtp
    Body radius_l: mass=0.4999535 mass_center=(0 -0.115861 0) inertia=(0.002252624 0.0004699938 0.002443512 0 0 0)
        meshes=radius_lv.vtp
    Body hand_l: mass=0.3765082 mass_center=(0 -0.06545991 0) inertia=(0.000678373 0.0004159978 0.00101908 0 0 0)
        meshes=(pisiform_lvs.vtp lunate_lvs.vtp scaphoid_lvs.vtp triquetrum_lvs.vtp hamate_lvs.vtp capitate_lvs.vtp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)
  JointSet:
    CustomJoint ground_pelvis: socket_parent_frame=ground_offset socket_child_frame=pelvis_offset
      Coordinate pelvis_tilt: default_value=0 range=(-1.570796 1.570796) clamped=true
      Coordinate pelvis_list: default_value=0 range=(-1.570796 1.570796) clamped=true
      Coordinate pelvis_rotation: default_value=0 range=(-6.283185 6.283185) clamped=true
      Coordinate pelvis_tx: default_value=0 range=(-50 50) clamped=true
      Coordinate pelvis_ty: default_value=0.93 range=(-1 2) clamped=true
      Coordinate pelvis_tz: default_value=0 range=(-3 3) clamped=true
      PhysicalOffsetFrame ground_offset: socket_parent=/ground translation=(0 0 0) [meters]
      PhysicalOffsetFrame pelvis_offset: socket_parent=/bodyset/pelvis translation=(0 0 0)
      SpatialTransform:
        TransformAxis rotation1: coordinates=pelvis_tilt axis=(0 0 1) LinearFunction(coefficients=1 0)
        TransformAxis rotation2: coordinates=pelvis_list axis=(1 0 0) LinearFunction(coefficients=1 0)
        TransformAxis rotation3: coordinates=pelvis_rotation axis=(0 1 0) LinearFunction(coefficients=1 0)
        TransformAxis translation1: coordinates=pelvis_tx axis=(1 0 0) LinearFunction(coefficients=1 0)
        TransformAxis translation2: coordinates=pelvis_ty axis=(0 1 0) LinearFunction(coefficients=1 0)
        TransformAxis translation3: coordinates=pelvis_tz axis=(0 0 1) LinearFunction(coefficients=1 0)
    CustomJoint hip_r: socket_parent_frame=pelvis_offset socket_child_frame=femur_r_offset
      Coordinate hip_flexion_r: default_value=0 range=(-0.5235988 2.094395) clamped=true
      Coordinate hip_adduction_r: default_value=0 range=(-0.8726646 0.5235988) clamped=true
      Coordinate hip_rotation_r: default_value=0 range=(-0.6981317 0.6981317) clamped=true
      PhysicalOffsetFrame pelvis_offset: socket_parent=/bodyset/pelvis translation=(-0.06267896 -0.08742042 0.1052711)
      PhysicalOffsetFrame femur_r_offset: socket_parent=/bodyset/femur_r translation=(0 0 0)
      SpatialTransform: axes_held_at_zero=(translation1 translation2 translation3)
        TransformAxis rotation1: coordinates=hip_flexion_r axis=(0 0 1) LinearFunction(coefficients=1 0)
        TransformAxis rotation2: coordinates=hip_adduction_r axis=(1 0 0) LinearFunction(coefficients=1 0)
        TransformAxis rotation3: coordinates=hip_rotation_r axis=(0 1 0) LinearFunction(coefficients=1 0)
    CustomJoint walker_knee_r: socket_parent_frame=femur_r_offset socket_child_frame=tibia_r_offset
      Coordinate knee_angle_r: default_value=0 range=(0 2.443461) clamped=true
      PhysicalOffsetFrame femur_r_offset: socket_parent=/bodyset/femur_r
          translation=(-0.004336746 -0.3947402 -0.001686512) orientation=(-1.64157 1.44618 1.5708) [radians]
      PhysicalOffsetFrame tibia_r_offset: socket_parent=/bodyset/tibia_r
          translation=(-0.007892024 -0.003448494 -0.001448488) orientation=(-1.64157 1.44618 1.5708)
      SpatialTransform:
        TransformAxis rotation1: coordinates=knee_angle_r axis=(1 0 0) LinearFunction(coefficients=1 0)
        TransformAxis rotation2: coordinates=knee_angle_r axis=(0 0 1)
          PolynomialFunction: coefficients=(0.01083209 -0.02521833 -0.03284781 0.07910001 -1.473252e-8)
        TransformAxis rotation3: coordinates=knee_angle_r axis=(0 1 0)
          PolynomialFunction: coefficients=(0.02516576 -0.1694801 0.3694993 -4.430358e-8)
        TransformAxis translation1: coordinates=knee_angle_r axis=(1 0 0)
          MultiplierFunction: scale=0.9637213
            PolynomialFunction: coefficients=(0.0001590448 -0.00101515 0.001817511 2.641427e-5 -7.746564e-7)
        TransformAxis translation2: coordinates=knee_angle_r axis=(0 1 0)
          MultiplierFunction: scale=0.9637213
            PolynomialFunction: coefficients=(-0.0005796878 0.005079766 -0.01144238 0.003936909 -2.51635e-5)
        TransformAxis translation3: coordinates=knee_angle_r axis=(0 0 1)
          MultiplierFunction: scale=0.9637213
            PolynomialFunction: coefficients=(0.001208087 -0.004453611 0.0006116494 0.00626543 -1.461913e-5)
    CustomJoint patellofemoral_r: socket_parent_frame=femur_r_offset socket_child_frame=patella_r_offset
      Coordinate knee_angle_r_beta: default_value=0 range=(-99999.9 99999.9) clamped=false
      PhysicalOffsetFrame femur_r_offset: socket_parent=/bodyset/femur_r
          translation=(-0.007796505 -0.3931597 -0.002650234)
      PhysicalOffsetFrame patella_r_offset: socket_parent=/bodyset/patella_r translation=(0 0 0)
      SpatialTransform: axes_held_at_zero=(rotation2 rotation3)
        TransformAxis rotation1: coordinates=knee_angle_r_beta axis=(0 0 1)
          SimmSpline: x=(0 0.174533 0.349066 0.523599 0.698132 0.872665 1.0472 1.22173 1.39626 1.5708 1.74533 1.91986 2.0944)
              y=(0.00113686 -0.00629212 -0.105582 -0.253683 -0.414245 -0.579047 -0.747244 -0.91799 -1.09044 -1.26379 -1.43763 -1.61186 -1.78634)
        TransformAxis translation1: coordinates=knee_angle_r_beta axis=(1 0 0)
          MultiplierFunction: scale=0.9637213
            SimmSpline: x=(0 0.174533 0.349066 0.523599 0.698132 0.872665 1.0472 1.22173 1.39626 1.5708 1.74533 1.91986 2.0944)
                y=(0.0524 0.0488 0.0437 0.0371 0.0296 0.0216 0.0136 0.0057 -0.0019 -0.0088 -0.0148 -0.0196 -0.0227)
        TransformAxis translation2: coordinates=knee_angle_r_beta axis=(0 1 0)
          MultiplierFunction: scale=0.9637213
            SimmSpline: x=(0 0.174533 0.349066 0.523599 0.698132 0.872665 1.0472 1.22173 1.39626 1.5708 1.74533 1.91986 2.0944)
                y=(-0.0108 -0.019 -0.0263 -0.0322 -0.0367 -0.0395 -0.0408 -0.0404 -0.0384 -0.0349 -0.0301 -0.0245 -0.0187)
        TransformAxis translation3: axis=(0 0 1) MultiplierFunction(scale=0.9637213, Constant(value=0.00275))
    PinJoint ankle_r: socket_parent_frame=tibia_r_offset socket_child_frame=talus_r_offset
      Coordinate ankle_angle_r: default_value=0 range=(-0.8726646 0.8726646) clamped=true
      PhysicalOffsetFrame tibia_r_offset: socket_parent=/bodyset/tibia_r translation=(-0.009755838 -0.3902335 0)
          orientation=(0.175895 -0.105208 0.0186622)
      PhysicalOffsetFrame talus_r_offset: socket_parent=/bodyset/talus_r translation=(0 0 0)
          orientation=(0.175895 -0.105208 0.0186622)
    PinJoint subtalar_r: socket_parent_frame=talus_r_offset socket_child_frame=calcn_r_offset
      Coordinate subtalar_angle_r: default_value=0 range=(-0.6108652 0.6108652) clamped=true
      PhysicalOffsetFrame talus_r_offset: socket_parent=/bodyset/talus_r
          translation=(-0.04426453 -0.03807457 0.007188334) orientation=(-1.76819 0.906223 1.8196)
      PhysicalOffsetFrame calcn_r_offset: socket_parent=/bodyset/calcn_r translation=(0 0 0)
          orientation=(-1.76819 0.906223 1.8196)
    PinJoint mtp_r: socket_parent_frame=calcn_r_offset socket_child_frame=toes_r_offset
      Coordinate mtp_angle_r: default_value=0 range=(-0.7853982 0.5235988) clamped=true
      PhysicalOffsetFrame calcn_r_offset: socket_parent=/bodyset/calcn_r
          translation=(0.1622821 -0.001815236 0.0009802274) orientation=(-3.14159 0.619901 0)
      PhysicalOffsetFrame toes_r_offset: socket_parent=/bodyset/toes_r translation=(0 0 0)
          orientation=(-3.14159 0.619901 0)
    CustomJoint hip_l: socket_parent_frame=pelvis_offset socket_child_frame=femur_l_offset
      Coordinate hip_flexion_l: default_value=0 range=(-0.5235988 2.094395) clamped=true
      Coordinate hip_adduction_l: default_value=0 range=(-0.8726646 0.5235988) clamped=true
      Coordinate hip_rotation_l: default_value=0 range=(-0.6981317 0.6981317) clamped=true
      PhysicalOffsetFrame pelvis_offset: socket_parent=/bodyset/pelvis translation=(-0.06267896 -0.08742042 -0.1052711)
      PhysicalOffsetFrame femur_l_offset: socket_parent=/bodyset/femur_l translation=(0 0 0)
      SpatialTransform: axes_held_at_zero=(translation1 translation2 translation3)
        TransformAxis rotation1: coordinates=hip_flexion_l axis=(0 0 1) LinearFunction(coefficients=1 0)
        TransformAxis rotation2: coordinates=hip_adduction_l axis=(1 0 0) LinearFunction(coefficients=-1 0)
        TransformAxis rotation3: coordinates=hip_rotation_l axis=(0 1 0) LinearFunction(coefficients=-1 0)
    CustomJoint walker_knee_l: socket_parent_frame=femur_l_offset socket_child_frame=tibia_l_offset
      Coordinate knee_angle_l: default_value=0 range=(0 2.443461) clamped=true
      PhysicalOffsetFrame femur_l_offset: socket_parent=/bodyset/femur_l
          translation=(-0.004350596 -0.3960009 0.001691898) orientation=(1.64157 -1.44618 1.5708)
      PhysicalOffsetFrame tibia_l_offset: socket_parent=/bodyset/tibia_l
          translation=(-0.007733059 -0.003379032 0.001419312) orientation=(1.64157 -1.44618 1.5708)
      SpatialTransform:
        TransformAxis rotation1: coordinates=knee_angle_l axis=(-1 0 0) LinearFunction(coefficients=1 0)
        TransformAxis rotation2: coordinates=knee_angle_l axis=(0 0 1)
          PolynomialFunction: coefficients=(0.01083209 -0.02521833 -0.03284781 0.07910001 -1.473252e-8)
        TransformAxis rotation3: coordinates=knee_angle_l axis=(0 1 0)
          PolynomialFunction: coefficients=(-0.02516576 0.1694801 -0.3694993 4.430358e-8)
        TransformAxis translation1: coordinates=knee_angle_l axis=(1 0 0)
          MultiplierFunction: scale=0.9667991
            PolynomialFunction: coefficients=(0.0001590448 -0.00101515 0.001817511 2.641427e-5 -7.746564e-7)
        TransformAxis translation2: coordinates=knee_angle_l axis=(0 1 0)
          MultiplierFunction: scale=0.9667991
            PolynomialFunction: coefficients=(-0.0005796878 0.005079766 -0.01144238 0.003936909 -2.51635e-5)
        TransformAxis translation3: coordinates=knee_angle_l axis=(0 0 1)
          MultiplierFunction: scale=0.9667991
            PolynomialFunction: coefficients=(-0.001208087 0.004453611 -0.0006116494 -0.00626543 1.461913e-5)
    CustomJoint patellofemoral_l: socket_parent_frame=femur_l_offset socket_child_frame=patella_l_offset
      Coordinate knee_angle_l_beta: default_value=0 range=(-99999.9 99999.9) clamped=false
      PhysicalOffsetFrame femur_l_offset: socket_parent=/bodyset/femur_l
          translation=(-0.007821405 -0.3944154 0.002658698)
      PhysicalOffsetFrame patella_l_offset: socket_parent=/bodyset/patella_l translation=(0 0 0)
      SpatialTransform: axes_held_at_zero=(rotation2 rotation3)
        TransformAxis rotation1: coordinates=knee_angle_l_beta axis=(0 0 1)
          SimmSpline: x=(0 0.174533 0.349066 0.523599 0.698132 0.872665 1.0472 1.22173 1.39626 1.5708 1.74533 1.91986 2.0944)
              y=(0.00113686 -0.00629212 -0.105582 -0.253683 -0.414245 -0.579047 -0.747244 -0.91799 -1.09044 -1.26379 -1.43763 -1.61186 -1.78634)
        TransformAxis translation1: coordinates=knee_angle_l_beta axis=(1 0 0)
          MultiplierFunction: scale=0.9667991
            SimmSpline: x=(0 0.174533 0.349066 0.523599 0.698132 0.872665 1.0472 1.22173 1.39626 1.5708 1.74533 1.91986 2.0944)
                y=(0.0524 0.0488 0.0437 0.0371 0.0296 0.0216 0.0136 0.0057 -0.0019 -0.0088 -0.0148 -0.0196 -0.0227)
        TransformAxis translation2: coordinates=knee_angle_l_beta axis=(0 1 0)
          MultiplierFunction: scale=0.9667991
            SimmSpline: x=(0 0.174533 0.349066 0.523599 0.698132 0.872665 1.0472 1.22173 1.39626 1.5708 1.74533 1.91986 2.0944)
                y=(-0.0108 -0.019 -0.0263 -0.0322 -0.0367 -0.0395 -0.0408 -0.0404 -0.0384 -0.0349 -0.0301 -0.0245 -0.0187)
        TransformAxis translation3: axis=(0 0 1) MultiplierFunction(scale=0.9667991, Constant(value=-0.00275))
    PinJoint ankle_l: socket_parent_frame=tibia_l_offset socket_child_frame=talus_l_offset
      Coordinate ankle_angle_l: default_value=0 range=(-0.8726646 0.8726646) clamped=true
      PhysicalOffsetFrame tibia_l_offset: socket_parent=/bodyset/tibia_l translation=(-0.009559331 -0.3823732 0)
          orientation=(-0.175895 0.105208 0.0186622)
      PhysicalOffsetFrame talus_l_offset: socket_parent=/bodyset/talus_l translation=(0 0 0)
          orientation=(-0.175895 0.105208 0.0186622)
    PinJoint subtalar_l: socket_parent_frame=talus_l_offset socket_child_frame=calcn_l_offset
      Coordinate subtalar_angle_l: default_value=0 range=(-0.6108652 0.6108652) clamped=true
      PhysicalOffsetFrame talus_l_offset: socket_parent=/bodyset/talus_l
          translation=(-0.04426453 -0.03807457 -0.007188334) orientation=(1.76819 -0.906223 1.8196)
      PhysicalOffsetFrame calcn_l_offset: socket_parent=/bodyset/calcn_l translation=(0 0 0)
          orientation=(1.76819 -0.906223 1.8196)
    PinJoint mtp_l: socket_parent_frame=calcn_l_offset socket_child_frame=toes_l_offset
      Coordinate mtp_angle_l: default_value=0 range=(-0.7853982 0.5235988) clamped=true
      PhysicalOffsetFrame calcn_l_offset: socket_parent=/bodyset/calcn_l
          translation=(0.1622821 -0.001815236 -0.0009802274) orientation=(-3.14159 -0.619901 0)
      PhysicalOffsetFrame toes_l_offset: socket_parent=/bodyset/toes_l translation=(0 0 0)
          orientation=(-3.14159 -0.619901 0)
    CustomJoint back: socket_parent_frame=pelvis_offset socket_child_frame=torso_offset
      Coordinate lumbar_extension: default_value=0 range=(-1.570796 1.570796) clamped=true
      Coordinate lumbar_bending: default_value=0 range=(-1.570796 1.570796) clamped=true
      Coordinate lumbar_rotation: default_value=0 range=(-1.570796 1.570796) clamped=true
      PhysicalOffsetFrame pelvis_offset: socket_parent=/bodyset/pelvis translation=(-0.1121574 0.09077289 0)
      PhysicalOffsetFrame torso_offset: socket_parent=/bodyset/torso translation=(0 0 0)
      SpatialTransform: axes_held_at_zero=(translation1 translation2 translation3)
        TransformAxis rotation1: coordinates=lumbar_extension axis=(0 0 1) LinearFunction(coefficients=1 0)
        TransformAxis rotation2: coordinates=lumbar_bending axis=(1 0 0) LinearFunction(coefficients=1 0)
        TransformAxis rotation3: coordinates=lumbar_rotation axis=(0 1 0) LinearFunction(coefficients=1 0)
    CustomJoint acromial_r: socket_parent_frame=torso_offset socket_child_frame=humerus_r_offset
      Coordinate arm_flex_r: default_value=0 range=(-10 10) clamped=true
      Coordinate arm_add_r: default_value=0 range=(-10 10) clamped=true
      Coordinate arm_rot_r: default_value=0 range=(-10 10) clamped=true
      PhysicalOffsetFrame torso_offset: socket_parent=/bodyset/torso translation=(0.002910785 0.3427438 0.1885789)
      PhysicalOffsetFrame humerus_r_offset: socket_parent=/bodyset/humerus_r translation=(0 0 0)
      SpatialTransform: axes_held_at_zero=(translation1 translation2 translation3)
        TransformAxis rotation1: coordinates=arm_flex_r axis=(0 0 1) LinearFunction(coefficients=1 0)
        TransformAxis rotation2: coordinates=arm_add_r axis=(1 0 0) LinearFunction(coefficients=1 0)
        TransformAxis rotation3: coordinates=arm_rot_r axis=(0 1 0) LinearFunction(coefficients=1 0)
    PinJoint elbow_r: socket_parent_frame=humerus_r_offset socket_child_frame=ulna_r_offset
      Coordinate elbow_flex_r: default_value=0 range=(0 2.618) clamped=true
      PhysicalOffsetFrame humerus_r_offset: socket_parent=/bodyset/humerus_r
          translation=(0.01272298 -0.2771033 -0.00928766) orientation=(-0.0228627 0.228018 0.0051689)
      PhysicalOffsetFrame ulna_r_offset: socket_parent=/bodyset/ulna_r translation=(0 0 0)
          orientation=(-0.0228627 0.228018 0.0051689)
    PinJoint radioulnar_r: socket_parent_frame=ulna_r_offset socket_child_frame=radius_r_offset
      Coordinate pro_sup_r: default_value=0 range=(0 2.09) clamped=true
      PhysicalOffsetFrame ulna_r_offset: socket_parent=/bodyset/ulna_r
          translation=(-0.006466683 -0.01250366 0.02507366) orientation=(-1.56884 0.056428 1.53614)
      PhysicalOffsetFrame radius_r_offset: socket_parent=/bodyset/radius_r translation=(0 0 0)
          orientation=(-1.56884 0.056428 1.53614)
    WeldJoint radius_hand_r: socket_parent_frame=radius_r_offset socket_child_frame=hand_r_offset
      PhysicalOffsetFrame radius_r_offset: socket_parent=/bodyset/radius_r
          translation=(-0.00845658 -0.2267146 0.01308333) orientation=(-1.5708 0 -1.5708)
      PhysicalOffsetFrame hand_r_offset: socket_parent=/bodyset/hand_r translation=(0 0 0)
          orientation=(-1.5708 0 -1.5708)
    CustomJoint acromial_l: socket_parent_frame=torso_offset socket_child_frame=humerus_l_offset
      Coordinate arm_flex_l: default_value=0 range=(-10 10) clamped=true
      Coordinate arm_add_l: default_value=0 range=(-10 10) clamped=true
      Coordinate arm_rot_l: default_value=0 range=(-10 10) clamped=true
      PhysicalOffsetFrame torso_offset: socket_parent=/bodyset/torso translation=(0.002910785 0.3427438 -0.1885789)
      PhysicalOffsetFrame humerus_l_offset: socket_parent=/bodyset/humerus_l translation=(0 0 0)
      SpatialTransform: axes_held_at_zero=(translation1 translation2 translation3)
        TransformAxis rotation1: coordinates=arm_flex_l axis=(0 0 1) LinearFunction(coefficients=1 0)
        TransformAxis rotation2: coordinates=arm_add_l axis=(-1 0 0) LinearFunction(coefficients=1 0)
        TransformAxis rotation3: coordinates=arm_rot_l axis=(0 -1 0) LinearFunction(coefficients=1 0)
    PinJoint elbow_l: socket_parent_frame=humerus_l_offset socket_child_frame=ulna_l_offset
      Coordinate elbow_flex_l: default_value=0 range=(0 2.618) clamped=true
      PhysicalOffsetFrame humerus_l_offset: socket_parent=/bodyset/humerus_l
          translation=(0.01272298 -0.2771033 0.00928766) orientation=(0.0228627 -0.228018 0.0051689)
      PhysicalOffsetFrame ulna_l_offset: socket_parent=/bodyset/ulna_l translation=(0 0 0)
          orientation=(0.0228627 -0.228018 0.0051689)
    PinJoint radioulnar_l: socket_parent_frame=ulna_l_offset socket_child_frame=radius_l_offset
      Coordinate pro_sup_l: default_value=0 range=(0 2.09) clamped=true
      PhysicalOffsetFrame ulna_l_offset: socket_parent=/bodyset/ulna_l
          translation=(-0.006466683 -0.01250366 -0.02507366) orientation=(1.56884 -0.056428 1.53614)
      PhysicalOffsetFrame radius_l_offset: socket_parent=/bodyset/radius_l translation=(0 0 0)
          orientation=(1.56884 -0.056428 1.53614)
    WeldJoint radius_hand_l: socket_parent_frame=radius_l_offset socket_child_frame=hand_l_offset
      PhysicalOffsetFrame radius_l_offset: socket_parent=/bodyset/radius_l
          translation=(-0.00845658 -0.2267146 -0.01308333) orientation=(1.5708 0 1.5708)
      PhysicalOffsetFrame hand_l_offset: socket_parent=/bodyset/hand_l translation=(0 0 0)
          orientation=(1.5708 0 1.5708)
  ConstraintSet:
    CoordinateCouplerConstraint patellofemoral_knee_angle_r_con: independent_coordinate_names=knee_angle_r
        dependent_coordinate_name=knee_angle_r_beta scale_factor=1
        coupled_coordinates_function=LinearFunction(coefficients=1 0)
    CoordinateCouplerConstraint patellofemoral_knee_angle_l_con: independent_coordinate_names=knee_angle_l
        dependent_coordinate_name=knee_angle_l_beta scale_factor=1
        coupled_coordinates_function=LinearFunction(coefficients=1 0)
  ForceSet:
    CoordinateActuator lumbar_ext: coordinate=lumbar_extension optimal_force=250
    CoordinateActuator lumbar_bend: coordinate=lumbar_bending optimal_force=250
    CoordinateActuator lumbar_rot: coordinate=lumbar_rotation optimal_force=250
    CoordinateActuator shoulder_flex_r: coordinate=arm_flex_r optimal_force=250
    CoordinateActuator shoulder_add_r: coordinate=arm_add_r optimal_force=250
    CoordinateActuator shoulder_rot_r: coordinate=arm_rot_r optimal_force=250
    CoordinateActuator elbow_flex_r: coordinate=elbow_flex_r optimal_force=250
    CoordinateActuator pro_sup_r: coordinate=pro_sup_r optimal_force=250
    CoordinateActuator shoulder_flex_l: coordinate=arm_flex_l optimal_force=250
    CoordinateActuator shoulder_add_l: coordinate=arm_add_l optimal_force=250
    CoordinateActuator shoulder_rot_l: coordinate=arm_rot_l optimal_force=250
    CoordinateActuator elbow_flex_l: coordinate=elbow_flex_l optimal_force=250
    CoordinateActuator pro_sup_l: coordinate=pro_sup_l optimal_force=250
    DeGrooteFregly2016Muscle [values shared by the 80 below unless stated]: min_control=0.01 max_control=1
        max_contraction_velocity=10 ignore_tendon_compliance=true activation_time_constant=0.01
        deactivation_time_constant=0.04 default_activation=0.01 active_force_width_scale=1.5 fiber_damping=0.01
        passive_fiber_strain_at_one_norm_force=0.7 tendon_strain_at_one_norm_force=0.049
        ignore_passive_fiber_force=true
    DeGrooteFregly2016Muscle addbrev_r: max_isometric_force=625.8197 optimal_fiber_length=0.1114436
        tendon_slack_length=0.0383192 pennation_angle_at_optimal=0.1147809 [radians]
      PathPoint P1: pelvis (-0.02127316 -0.1046951 0.02098337)
      PathPoint P2: femur_r (-0.001927443 -0.1137191 0.02399666)
      PathWrap: wrap_object=AB_at_femshaft_r method=hybrid
    DeGrooteFregly2016Muscle addlong_r: max_isometric_force=916.8 optimal_fiber_length=0.1077616
        tendon_slack_length=0.1312654 pennation_angle_at_optimal=0.1377704
      PathPoint P1: pelvis (-0.008442435 -0.09901484 0.02572506)
      PathPoint P2: femur_r (0.0108515 -0.230686 0.01525571)
      PathWrap: wrap_object=AL_at_femshaft_r method=hybrid
    DeGrooteFregly2016Muscle addmagDist_r: max_isometric_force=597.2951 optimal_fiber_length=0.1689289
        tendon_slack_length=0.08330204 pennation_angle_at_optimal=0.194705
      PathPoint P1: pelvis (-0.08246411 -0.142196 0.05425699)
      PathPoint P2: femur_r (0.01084186 -0.2529768 0.01859982)
      PathWrap: wrap_object=AMdist_at_femshaft_r method=hybrid
    DeGrooteFregly2016Muscle addmagIsch_r: max_isometric_force=597.2951 optimal_fiber_length=0.1474216
        tendon_slack_length=0.2041846 pennation_angle_at_optimal=0.1680443
      PathPoint P1: pelvis (-0.09981676 -0.1445238 0.05683222)
      PathPoint P2: femur_r (0.004635499 -0.3738949 -0.0315426)
      PathWrap: wrap_object=AMisch_at_condyles_r method=hybrid
    DeGrooteFregly2016Muscle addmagMid_r: max_isometric_force=597.2951 optimal_fiber_length=0.1390041
        tendon_slack_length=0.04706929 pennation_angle_at_optimal=0.2073076
      PathPoint P1: pelvis (-0.05865154 -0.1344887 0.03888735)
      PathPoint P2: femur_r (0.002332205 -0.1565083 0.02815994)
      PathWrap: wrap_object=AMmid_at_femshaft_r method=hybrid
    DeGrooteFregly2016Muscle addmagProx_r: max_isometric_force=597.2951 optimal_fiber_length=0.1209712
        tendon_slack_length=0.04619371 pennation_angle_at_optimal=0.3114833
      PathPoint P1: pelvis (-0.03450483 -0.1197868 0.01859889)
      PathPoint P2: femur_r (-0.01471602 -0.07599906 0.03085836)
      PathWrap: wrap_object=AMprox_at_femshaft_r method=hybrid
    DeGrooteFregly2016Muscle bflh_r: max_isometric_force=1313.184 optimal_fiber_length=0.0931435
        tendon_slack_length=0.3173161 pennation_angle_at_optimal=0.1759182
      PathPoint P1: pelvis (-0.1158329 -0.1326509 0.07984579)
      PathPoint P2: tibia_r (-0.03352106 -0.0355893 0.03529662)
      PathPoint P3: tibia_r (-0.02637979 -0.04885724 0.03391129)
    DeGrooteFregly2016Muscle bfsh_r: max_isometric_force=557.1148 optimal_fiber_length=0.1064868
        tendon_slack_length=0.102159 pennation_angle_at_optimal=0.2642232
      PathPoint P1: femur_r (0.004818606 -0.2034416 0.02255108)
      PathPoint P2: tibia_r (-0.02796023 -0.03203817 0.03125771)
      PathWrap: wrap_object=BF_at_gastroc_r method=hybrid
    DeGrooteFregly2016Muscle edl_r: max_isometric_force=603.4982 optimal_fiber_length=0.06583553
        tendon_slack_length=0.3504343 pennation_angle_at_optimal=0.2182582
      PathPoint P1: tibia_r (-0.01560934 -0.112875 0.01999947)
      PathPoint P2: tibia_r (0.01599957 -0.3668195 0.01092654)
      PathPoint P3: calcn_r (0.08341009 0.03267425 0.0007260944)
      PathPoint P4: calcn_r (0.1466711 0.004991899 0.01179903)
      PathPoint P5: toes_r (0.0002722854 0.004265804 0.01388655)
      PathPoint P6: toes_r (0.04020748 -0.0003630472 0.02269045)
    DeGrooteFregly2016Muscle ehl_r: max_isometric_force=285.8675 optimal_fiber_length=0.07081129
        tendon_slack_length=0.3093689 pennation_angle_at_optimal=0.1972681
      PathPoint P1: tibia_r (-0.01365817 -0.1512155 0.01843853)
      PathPoint P2: tibia_r (0.006926645 -0.2837973 0.01599957)
      PathPoint P3: tibia_r (0.01951168 -0.3602831 -0.002731635)
      PathPoint P4: calcn_r (0.08803894 0.03530634 -0.01915074)
      PathPoint P5: calcn_r (0.117355 0.02804539 -0.02332578)
      PathPoint P6: calcn_r (0.157381 0.01261589 -0.0254133)
      PathPoint P7: toes_r (0.02704702 0.003721234 -0.02223664)
      PathPoint P8: toes_r (0.05109889 0.003085901 -0.01688169)
    DeGrooteFregly2016Muscle fdl_r: max_isometric_force=423.177 optimal_fiber_length=0.04202304
        tendon_slack_length=0.3568876 pennation_angle_at_optimal=0.2248391
      PathPoint P1: tibia_r (-0.002243843 -0.178727 -0.001756051)
      PathPoint P2: tibia_r (-0.01717028 -0.3556003 -0.01209724)
      PathPoint P3: calcn_r (0.03957214 0.02858997 -0.0254133)
      PathPoint P4: calcn_r (0.06425935 0.01597408 -0.02387035)
      PathPoint P5: calcn_r (0.1504831 -0.007351705 0.01052837)
      PathPoint P6: toes_r (-0.001724474 -0.00707942 0.01334198)
      PathPoint P7: toes_r (0.02586711 -0.006444087 0.01951379)
      PathPoint P8: toes_r (0.04002595 -0.005445708 0.02196435)
    DeGrooteFregly2016Muscle fhl_r: max_isometric_force=907.8393 optimal_fiber_length=0.04947308
        tendon_slack_length=0.3326428 pennation_angle_at_optimal=0.2580255
      PathPoint P1: tibia_r (-0.0302431 -0.2110188 0.01951168)
      PathPoint P2: tibia_r (-0.02360913 -0.3581368 -0.007414437)
      PathPoint P3: calcn_r (0.03394491 0.02505026 -0.02187359)
      PathPoint P4: calcn_r (0.09421074 0.006171802 -0.02323502)
      PathPoint P5: calcn_r (0.1566549 -0.004810375 -0.02441492)
      PathPoint P6: toes_r (0.01406808 -0.005808755 -0.02405188)
      PathPoint P7: toes_r (0.05100813 -0.009257703 -0.01642788)
    DeGrooteFregly2016Muscle gaslat_r: max_isometric_force=1575.059 optimal_fiber_length=0.06717248
        tendon_slack_length=0.3640943 pennation_angle_at_optimal=0.2102268
      PathPoint P1: femur_r (0.001927443 -0.3671778 0.01984302)
      PathPoint P2: calcn_r (0.003993519 0.02813616 -0.004810375)
      PathWrap: wrap_object=GasLat_at_shank_r method=hybrid
      PathWrap pathwrap_0: wrap_object=GasLat_at_condyles_r method=hybrid
    DeGrooteFregly2016Muscle gasmed_r: max_isometric_force=3115.515 optimal_fiber_length=0.05744376
        tendon_slack_length=0.3767921 pennation_angle_at_optimal=0.1656816
      PathPoint P1: femur_r (0.005782328 -0.3710327 -0.02120187)
      PathPoint P2: calcn_r (0.003993519 0.02813616 -0.004810375)
      PathWrap: wrap_object=GasMed_at_shank_r method=hybrid
      PathWrap pathwrap_0: wrap_object=GasMed_at_condyles_r method=hybrid
    DeGrooteFregly2016Muscle glmax1_r: max_isometric_force=983.7836 optimal_fiber_length=0.1584857
        tendon_slack_length=0.09412112 pennation_angle_at_optimal=0.3540118
      PathPoint P1: pelvis (-0.137106 0.03842533 0.07671191)
      PathPoint P2: pelvis (-0.1400019 -0.02695342 0.1061431)
      PathPoint P3: femur_r (-0.04278922 -0.03141731 0.02910438)
      PathPoint P4: femur_r (-0.02669508 -0.05454662 0.0452949)
      PathWrap: wrap_object=Gmax1_at_pelvis_r method=hybrid
    DeGrooteFregly2016Muscle glmax2_r: max_isometric_force=1406.046 optimal_fiber_length=0.1678666
        tendon_slack_length=0.1165443 pennation_angle_at_optimal=0.3673821
      PathPoint P1: pelvis (-0.1466845 0.009689866 0.0629501)
      PathPoint P2: pelvis (-0.1496917 -0.06782907 0.1107758)
      PathPoint P3: femur_r (-0.04336746 -0.05628132 0.02428578)
      PathPoint P4: femur_r (-0.01503405 -0.09791408 0.04037992)
      PathWrap: wrap_object=Gmax2_at_pelvis_r method=hybrid
    DeGrooteFregly2016Muscle glmax3_r: max_isometric_force=947.7541 optimal_fiber_length=0.1794735
        tendon_slack_length=0.1106932 pennation_angle_at_optimal=0.3824161
      PathPoint P1: pelvis (-0.1447911 -0.05847333 0.01226301)
      PathPoint P2: pelvis (-0.1417839 -0.1406701 0.05927119)
      PathPoint P3: femur_r (-0.02708057 -0.1084186 0.00905898)
      PathPoint P4: femur_r (-0.005782328 -0.136752 0.03960894)
      PathWrap: wrap_object=Gmax3_at_pelvis_r method=hybrid
    DeGrooteFregly2016Muscle glmed1_r: max_isometric_force=1093.467 optimal_fiber_length=0.08222469
        tendon_slack_length=0.06287771 pennation_angle_at_optimal=0.3165559
      PathPoint P1: pelvis (-0.05457511 0.02895822 0.156694)
      PathPoint P2_0: femur_r (-0.0134921 -0.01734698 0.05685956)
    DeGrooteFregly2016Muscle glmed2_r: max_isometric_force=765.0917 optimal_fiber_length=0.09122743
        tendon_slack_length=0.08194178 pennation_angle_at_optimal=0.3165559
      PathPoint P1: pelvis (-0.09467111 0.06125778 0.1117296)
      PathPoint P2_0: femur_r (-0.02120187 -0.009637213 0.05396839)
    DeGrooteFregly2016Muscle glmed3_r: max_isometric_force=871.1993 optimal_fiber_length=0.08542093
        tendon_slack_length=0.05293692 pennation_angle_at_optimal=0.3165559
      PathPoint P1: pelvis (-0.1113778 0.01782044 0.0872036)
      PathPoint P2_0: femur_r (-0.02977899 -0.00452949 0.04992076)
    DeGrooteFregly2016Muscle glmin1_r: max_isometric_force=374.0459 optimal_fiber_length=0.08774174
        tendon_slack_length=0.02082922 pennation_angle_at_optimal=0.1745329
      PathPoint P1: pelvis (-0.03341333 0 0.1607816)
      PathPoint P2: femur_r (0.004818606 -0.01445582 0.05396839)
    DeGrooteFregly2016Muscle glmin2_r: max_isometric_force=394.8197 optimal_fiber_length=0.07355429
        tendon_slack_length=0.03428251 pennation_angle_at_optimal=0
      PathPoint P1: pelvis (-0.06860871 0.01113778 0.1376182)
      PathPoint P2: femur_r (0.003854885 -0.008673491 0.05011351)
    DeGrooteFregly2016Muscle glmin3_r: max_isometric_force=446.7738 optimal_fiber_length=0.03734918
        tendon_slack_length=0.04993998 pennation_angle_at_optimal=0.01745329
      PathPoint P1: pelvis (-0.08787706 -0.01726356 0.108732)
      PathPoint P2: femur_r (-0.003854885 -0.0009637213 0.04914978)
    DeGrooteFregly2016Muscle grac_r: max_isometric_force=281.3115 optimal_fiber_length=0.2169349
        tendon_slack_length=0.1638095 pennation_angle_at_optimal=0.1720016
      PathPoint P1: pelvis (-0.05274851 -0.1440337 0.03346438)
      PathPoint P2: tibia_r (-0.01797025 -0.04638901 -0.02888704)
      PathPoint P3: tibia_r (0.001736539 -0.06792015 -0.01534593)
      PathWrap: wrap_object=GR_at_condyles_r method=hybrid
    DeGrooteFregly2016Muscle iliacus_r: max_isometric_force=1021.141 optimal_fiber_length=0.1149038
        tendon_slack_length=0.1036082 pennation_angle_at_optimal=0.279914
      PathPoint P1: pelvis (-0.06738355 0.03441573 0.1148635)
      PathPoint P2: pelvis (-0.015036 -0.06203742 0.1030092)
      PathPoint P3: femur_r (-0.002216559 -0.05445025 0.01339573)
      PathPoint P4: femur_r (-0.0117574 -0.06138905 0.01888894)
      PathWrap: wrap_object=IL_at_brim_r method=hybrid range=(2 3)
    DeGrooteFregly2016Muscle perbrev_r: max_isometric_force=521.2016 optimal_fiber_length=0.04368561
        tendon_slack_length=0.1419566 pennation_angle_at_optimal=0.2052361
      PathPoint P1: tibia_r (-0.02370669 -0.2470178 0.02448715)
      PathPoint P2: tibia_r (-0.03307229 -0.3797948 0.02429204)
      PathPoint P3: tibia_r (-0.02780414 -0.3906238 0.02487739)
      PathPoint P4: calcn_r (0.04274881 0.02450568 0.0211475)
      PathPoint P5: calcn_r (0.06144574 0.01987683 0.0311313)
    DeGrooteFregly2016Muscle perlong_r: max_isometric_force=1115.371 optimal_fiber_length=0.04850977
        tendon_slack_length=0.3172431 pennation_angle_at_optimal=0.2479525
      PathPoint P1: tibia_r (-0.01951168 -0.1339477 0.02751146)
      PathPoint P2: tibia_r (-0.03092601 -0.3804777 0.02312134)
      PathPoint P3: tibia_r (-0.02653588 -0.3915993 0.02341401)
      PathPoint P4: calcn_r (0.03975367 0.02087521 0.02005836)
      PathPoint P5: calcn_r (0.06180878 0.00962075 0.02577635)
      PathPoint P6: calcn_r (0.07732905 0.006262564 0.01070989)
      PathPoint P7: calcn_r (0.1091864 0.007714753 -0.01670017)
    DeGrooteFregly2016Muscle piri_r: max_isometric_force=1029.787 optimal_fiber_length=0.03074464
        tendon_slack_length=0.1358751 pennation_angle_at_optimal=0.1745329
      PathPoint P1: pelvis (-0.1133937 -0.007272969 0.01840813)
      PathPoint P2: pelvis (-0.1136276 -0.03414843 0.08300692)
      PathPoint P3: femur_r (-0.01426307 -0.003469397 0.04211462)
    DeGrooteFregly2016Muscle psoas_r: max_isometric_force=1426.79 optimal_fiber_length=0.1272973
        tendon_slack_length=0.1083968 pennation_angle_at_optimal=0.2155251
      PathPoint P1: pelvis (-0.06749493 0.06905422 0.05313969)
      PathPoint P2: pelvis (-0.02283244 -0.07284107 0.08938369)
      PathPoint P3: femur_r (-0.01272112 -0.04500578 0.004433118)
      PathPoint P4: femur_r (-0.02264745 -0.05049899 0.008480747)
      PathWrap: wrap_object=PS_at_brim_r method=hybrid range=(2 3)
    DeGrooteFregly2016Muscle recfem_r: max_isometric_force=2191.741 optimal_fiber_length=0.07411968
        tendon_slack_length=0.4398383 pennation_angle_at_optimal=0.2170149
      PathPoint P1: pelvis (-0.02673067 -0.04321458 0.1271265)
      PathPoint P2: patella_r (0.009637213 0.04722234 0.0006746049)
      PathPoint P3: patella_r (0.01166103 0.04211462 -0.0009637213)
      PathPoint P4: patella_r (0.004818606 0.002380392 2.891164e-5)
      PathPoint P5: tibia_r (0.03180403 -0.06157885 -0.0004585244)
      PathWrap: wrap_object=KnExt_at_fem_r method=hybrid
    DeGrooteFregly2016Muscle sart_r: max_isometric_force=249.4131 optimal_fiber_length=0.3973273
        tendon_slack_length=0.1222544 pennation_angle_at_optimal=0.02613542
      PathPoint P1: pelvis (-0.02171867 -0.01737493 0.1438859)
      PathPoint P2: femur_r (-0.002891164 -0.3438558 -0.04057267)
      PathPoint P3: tibia_r (-0.02448715 -0.03912091 -0.03560881)
      PathPoint P4: tibia_r (-0.01551178 -0.05843747 -0.02575541)
      PathPoint P5: tibia_r (0.01326794 -0.07902229 -0.002536518)
    DeGrooteFregly2016Muscle semimem_r: max_isometric_force=2200.987 optimal_fiber_length=0.08191346
        tendon_slack_length=0.3190815 pennation_angle_at_optimal=0.2545615
      PathPoint P1: pelvis (-0.1099299 -0.1269707 0.08366095)
      PathPoint P2: tibia_r (-0.02634076 -0.03999894 -0.01912144)
      PathWrap: wrap_object=SM_at_condyles_r method=hybrid
    DeGrooteFregly2016Muscle semiten_r: max_isometric_force=591.2951 optimal_fiber_length=0.1836663
        tendon_slack_length=0.2352441 pennation_angle_at_optimal=0.241295
      PathPoint P1: pelvis (-0.1156101 -0.1395564 0.07017164)
      PathPoint P2: tibia_r (-0.03043822 -0.04955966 -0.02234087)
      PathPoint P3: tibia_r (0.001853609 -0.07541263 -0.01141433)
      PathWrap: wrap_object=ST_at_condyles_r method=hybrid
    DeGrooteFregly2016Muscle soleus_r: max_isometric_force=6194.843 optimal_fiber_length=0.04276815
        tendon_slack_length=0.2734732 pennation_angle_at_optimal=0.3814289
      PathPoint P1: tibia_r (-0.007414437 -0.08936348 0.009560721)
      PathPoint P2: calcn_r (0.003993519 0.02813616 -0.004810375)
    DeGrooteFregly2016Muscle tfl_r: max_isometric_force=411.2066 optimal_fiber_length=0.09226523
        tendon_slack_length=0.4365636 pennation_angle_at_optimal=0.05235988
      PathPoint P1: pelvis (-0.02227556 0.01225156 0.1757698)
      PathPoint P2: femur_r (0.02833341 -0.09589027 0.05753416)
      PathPoint P3: femur_r (0.01031182 -0.3903071 0.03122457)
      PathPoint P4: tibia_r (0.01053631 -0.03999894 0.0337552)
    DeGrooteFregly2016Muscle tibant_r: max_isometric_force=1227.452 optimal_fiber_length=0.06577228
        tendon_slack_length=0.2315618 pennation_angle_at_optimal=0.1951828
      PathPoint P1: tibia_r (0.01502399 -0.1279966 0.01580446)
      PathPoint P2: tibia_r (0.02448715 -0.1859463 0.01248747)
      PathPoint P3: tibia_r (0.0227311 -0.3569661 -0.01287771)
      PathPoint P4: calcn_r (0.1058283 0.0161556 -0.02768235)
    DeGrooteFregly2016Muscle tibpost_r: max_isometric_force=1730.154 optimal_fiber_length=0.03648044
        tendon_slack_length=0.2709779 pennation_angle_at_optimal=0.2264891
      PathPoint P1: tibia_r (-0.003999894 -0.1272161 0.01004851)
      PathPoint P2: tibia_r (-0.01599957 -0.3565759 -0.01707272)
      PathPoint P3: calcn_r (0.03784767 0.03031444 -0.02595787)
      PathPoint P4: calcn_r (0.07006811 0.01443113 -0.02550406)
    DeGrooteFregly2016Muscle vasint_r: max_isometric_force=1697.361 optimal_fiber_length=0.1129932
        tendon_slack_length=0.1979796 pennation_angle_at_optimal=0.06309973
      PathPoint P1: femur_r (0.02794792 -0.18542 0.02987536)
      PathPoint P2: femur_r (0.03228466 -0.2008395 0.02746606)
      PathPoint P3: patella_r (0.005589583 0.04625862 -0.0005782328)
      PathPoint P4: patella_r (0.004818606 0.002380392 -0.0003758513)
      PathPoint P5: tibia_r (0.03177477 -0.0616569 0.000419501)
      PathWrap: wrap_object=KnExt_at_fem_r method=hybrid
    DeGrooteFregly2016Muscle vaslat_r: max_isometric_force=5148.767 optimal_fiber_length=0.1129816
        tendon_slack_length=0.2134097 pennation_angle_at_optimal=0.2528673
      PathPoint P1: femur_r (0.004625862 -0.1786739 0.03363387)
      PathPoint P2: femur_r (0.0259241 -0.2497002 0.0394162)
      PathPoint P3: patella_r (0.009926329 0.04076541 0.01358847)
      PathPoint P4: patella_r (0.004818606 0.002380392 0.007064077)
      PathPoint P5: tibia_r (0.0317455 -0.0618325 0.004985233)
      PathWrap: wrap_object=KnExtVL_at_fem_r method=hybrid
    DeGrooteFregly2016Muscle vasmed_r: max_isometric_force=2747.823 optimal_fiber_length=0.1062419
        tendon_slack_length=0.2008937 pennation_angle_at_optimal=0.4222225
      PathPoint P1: femur_r (0.0134921 -0.2022851 0.01811796)
      PathPoint P2: femur_r (0.03430848 -0.2668544 0.0008673491)
      PathPoint P3: patella_r (0.006071444 0.0428856 -0.01638326)
      PathPoint P4: patella_r (0.004818606 0.002380392 -0.008191631)
      PathPoint P5: tibia_r (0.03112112 -0.06201786 -0.006614458)
      PathWrap: wrap_object=KnExt_at_fem_r method=hybrid
    DeGrooteFregly2016Muscle addbrev_l: max_isometric_force=625.8197 optimal_fiber_length=0.1116561
        tendon_slack_length=0.03839225 pennation_angle_at_optimal=0.1147809
      PathPoint P1: pelvis (-0.02127316 -0.1046951 -0.02098337)
      PathPoint P2: femur_l (-0.001933598 -0.1140823 -0.0240733)
      PathWrap: wrap_object=AB_at_femshaft_l method=hybrid
    DeGrooteFregly2016Muscle addlong_l: max_isometric_force=916.8 optimal_fiber_length=0.1080625
        tendon_slack_length=0.1316319 pennation_angle_at_optimal=0.1377704
      PathPoint P1: pelvis (-0.008442435 -0.09901484 -0.02572506)
      PathPoint P2: femur_l (0.01088616 -0.2314227 -0.01530443)
      PathWrap: wrap_object=AL_at_femshaft_l method=hybrid
    DeGrooteFregly2016Muscle addmagDist_l: max_isometric_force=597.2951 optimal_fiber_length=0.1695494
        tendon_slack_length=0.08360804 pennation_angle_at_optimal=0.194705
      PathPoint P1: pelvis (-0.08246411 -0.142196 -0.05425699)
      PathPoint P2: femur_l (0.01087649 -0.2537848 -0.01865922)
      PathWrap: wrap_object=AMdist_at_femshaft_l method=hybrid
    DeGrooteFregly2016Muscle addmagIsch_l: max_isometric_force=597.2951 optimal_fiber_length=0.1479652
        tendon_slack_length=0.2049376 pennation_angle_at_optimal=0.1680443
      PathPoint P1: pelvis (-0.09981676 -0.1445238 -0.05683222)
      PathPoint P2: femur_l (0.004650304 -0.375089 0.03164333)
      PathWrap: wrap_object=AMisch_at_condyles_l method=hybrid
    DeGrooteFregly2016Muscle addmagMid_l: max_isometric_force=597.2951 optimal_fiber_length=0.1394247
        tendon_slack_length=0.04721171 pennation_angle_at_optimal=0.2073076
      PathPoint P1: pelvis (-0.05865154 -0.1344887 -0.03888735)
      PathPoint P2: femur_l (0.002339654 -0.1570082 -0.02824987)
      PathWrap: wrap_object=AMmid_at_femshaft_l method=hybrid
    DeGrooteFregly2016Muscle addmagProx_l: max_isometric_force=597.2951 optimal_fiber_length=0.1211405
        tendon_slack_length=0.04625833 pennation_angle_at_optimal=0.3114833
      PathPoint P1: pelvis (-0.03450483 -0.1197868 -0.01859889)
      PathPoint P2: femur_l (-0.01476302 -0.07624178 -0.03095691)
      PathWrap: wrap_object=AMprox_at_femshaft_l method=hybrid
    DeGrooteFregly2016Muscle bflh_l: max_isometric_force=1313.184 optimal_fiber_length=0.09319306
        tendon_slack_length=0.3174855 pennation_angle_at_optimal=0.1759182
      PathPoint P1: pelvis (-0.1158329 -0.1326509 -0.07984579)
      PathPoint P2: tibia_l (-0.03284586 -0.03487244 -0.03458566)
      PathPoint P3: tibia_l (-0.02584843 -0.04787313 -0.03322823)
    DeGrooteFregly2016Muscle bfsh_l: max_isometric_force=557.1148 optimal_fiber_length=0.1064669
        tendon_slack_length=0.1021399 pennation_angle_at_optimal=0.2642232
      PathPoint P1: femur_l (0.004833996 -0.2040913 -0.0226231)
      PathPoint P2: tibia_l (-0.02739704 -0.03139284 -0.0306281)
      PathWrap: wrap_object=BF_at_gastroc_l method=hybrid
    DeGrooteFregly2016Muscle edl_l: max_isometric_force=603.4982 optimal_fiber_length=0.06498312
        tendon_slack_length=0.3458971 pennation_angle_at_optimal=0.2182582
      PathPoint P1: tibia_l (-0.01529493 -0.1106015 -0.01959663)
      PathPoint P2: tibia_l (0.0156773 -0.3594308 -0.01070645)
      PathPoint P3: calcn_l (0.08341009 0.03267425 -0.0007260944)
      PathPoint P4: calcn_l (0.1466711 0.004991899 -0.01179903)
      PathPoint P5: toes_l (0.0002722854 0.004265804 -0.01388655)
      PathPoint P6: toes_l (0.04020748 -0.0003630472 -0.02269045)
    DeGrooteFregly2016Muscle ehl_l: max_isometric_force=285.8675 optimal_fiber_length=0.0699626
        tendon_slack_length=0.3056611 pennation_angle_at_optimal=0.1972681
      PathPoint P1: tibia_l (-0.01338306 -0.1481696 -0.01806714)
      PathPoint P2: tibia_l (0.006787125 -0.2780809 -0.0156773)
      PathPoint P3: tibia_l (0.01911866 -0.3530261 0.002676613)
      PathPoint P4: calcn_l (0.08803894 0.03530634 0.01915074)
      PathPoint P5: calcn_l (0.117355 0.02804539 0.02332578)
      PathPoint P6: calcn_l (0.157381 0.01261589 0.0254133)
      PathPoint P7: toes_l (0.02704702 0.003721234 0.02223664)
      PathPoint P8: toes_l (0.05109889 0.003085901 0.01688169)
    DeGrooteFregly2016Muscle fdl_l: max_isometric_force=423.177 optimal_fiber_length=0.04157644
        tendon_slack_length=0.3530948 pennation_angle_at_optimal=0.2248391
      PathPoint P1: tibia_l (-0.002198646 -0.1751269 0.00172068)
      PathPoint P2: tibia_l (-0.01682442 -0.3484376 0.01185357)
      PathPoint P3: calcn_l (0.03957214 0.02858997 0.0254133)
      PathPoint P4: calcn_l (0.06425935 0.01597408 0.02387035)
      PathPoint P5: calcn_l (0.1504831 -0.007351705 -0.01052837)
      PathPoint P6: toes_l (-0.001724474 -0.00707942 -0.01334198)
      PathPoint P7: toes_l (0.02586711 -0.006444087 -0.01951379)
      PathPoint P8: toes_l (0.04002595 -0.005445708 -0.02196435)
    DeGrooteFregly2016Muscle fhl_l: max_isometric_force=907.8393 optimal_fiber_length=0.04899801
        tendon_slack_length=0.3294486 pennation_angle_at_optimal=0.2580255
      PathPoint P1: tibia_l (-0.02963393 -0.2067683 -0.01911866)
      PathPoint P2: tibia_l (-0.02313358 -0.350923 0.007265091)
      PathPoint P3: calcn_l (0.03394491 0.02505026 0.02187359)
      PathPoint P4: calcn_l (0.09421074 0.006171802 0.02323502)
      PathPoint P5: calcn_l (0.1566549 -0.004810375 0.02441492)
      PathPoint P6: toes_l (0.01406808 -0.005808755 0.02405188)
      PathPoint P7: toes_l (0.05100813 -0.009257703 0.01642788)
    DeGrooteFregly2016Muscle gaslat_l: max_isometric_force=1575.059 optimal_fiber_length=0.06591309
        tendon_slack_length=0.357268 pennation_angle_at_optimal=0.2102268
      PathPoint P1: femur_l (0.001933598 -0.3683505 -0.01990639)
      PathPoint P2: calcn_l (0.003993519 0.02813616 0.004810375)
      PathWrap: wrap_object=GasLat_at_shank_l method=hybrid
      PathWrap pathwrap_0: wrap_object=GasLat_at_condyles_l method=hybrid
    DeGrooteFregly2016Muscle gasmed_l: max_isometric_force=3115.515 optimal_fiber_length=0.0563707
        tendon_slack_length=0.3697536 pennation_angle_at_optimal=0.1656816
      PathPoint P1: femur_l (0.005800795 -0.3722177 0.02126958)
      PathPoint P2: calcn_l (0.003993519 0.02813616 0.004810375)
      PathWrap: wrap_object=GasMed_at_shank_l method=hybrid
      PathWrap pathwrap_0: wrap_object=GasMed_at_condyles_l method=hybrid
    DeGrooteFregly2016Muscle glmax1_l: max_isometric_force=983.7836 optimal_fiber_length=0.1586136
        tendon_slack_length=0.09419708 pennation_angle_at_optimal=0.3540118
      PathPoint P1: pelvis (-0.137106 0.03842533 -0.07671191)
      PathPoint P2: pelvis (-0.1400019 -0.02695342 -0.1061431)
      PathPoint P3: femur_l (-0.04292588 -0.03151765 -0.02919733)
      PathPoint P4: femur_l (-0.02678034 -0.05472083 -0.04543956)
      PathWrap: wrap_object=Gmax1_at_pelvis_l method=hybrid
    DeGrooteFregly2016Muscle glmax2_l: max_isometric_force=1406.046 optimal_fiber_length=0.1680608
        tendon_slack_length=0.1166792 pennation_angle_at_optimal=0.3673821
      PathPoint P1: pelvis (-0.1466845 0.009689866 -0.0629501)
      PathPoint P2: pelvis (-0.1496917 -0.06782907 -0.1107758)
      PathPoint P3: femur_l (-0.04350596 -0.05646107 -0.02436334)
      PathPoint P4: femur_l (-0.01508207 -0.09822679 -0.04050888)
      PathWrap: wrap_object=Gmax2_at_pelvis_l method=hybrid
    DeGrooteFregly2016Muscle glmax3_l: max_isometric_force=947.7541 optimal_fiber_length=0.1797197
        tendon_slack_length=0.1108451 pennation_angle_at_optimal=0.3824161
      PathPoint P1: pelvis (-0.1447911 -0.05847333 -0.01226301)
      PathPoint P2: pelvis (-0.1417839 -0.1406701 -0.05927119)
      PathPoint P3: femur_l (-0.02716705 -0.1087649 -0.009087912)
      PathPoint P4: femur_l (-0.005800795 -0.1371888 -0.03973544)
      PathWrap: wrap_object=Gmax3_at_pelvis_l method=hybrid
    DeGrooteFregly2016Muscle glmed1_l: max_isometric_force=1093.467 optimal_fiber_length=0.08226649
        tendon_slack_length=0.06290967 pennation_angle_at_optimal=0.3165559
      PathPoint P1: pelvis (-0.05457511 0.02895822 -0.156694)
      PathPoint P2: femur_l (-0.01353519 -0.01740238 -0.05704115)
    DeGrooteFregly2016Muscle glmed2_l: max_isometric_force=765.0917 optimal_fiber_length=0.09126848
        tendon_slack_length=0.08197865 pennation_angle_at_optimal=0.3165559
      PathPoint P1: pelvis (-0.09467111 0.06125778 -0.1117296)
      PathPoint P2: femur_l (-0.02126958 -0.009667991 -0.05414075)
    DeGrooteFregly2016Muscle glmed3_l: max_isometric_force=871.1993 optimal_fiber_length=0.08547431
        tendon_slack_length=0.05297 pennation_angle_at_optimal=0.3165559
      PathPoint P1: pelvis (-0.1113778 0.01782044 -0.0872036)
      PathPoint P2: femur_l (-0.02987409 -0.004543956 -0.05008019)
    DeGrooteFregly2016Muscle glmin1_l: max_isometric_force=374.0459 optimal_fiber_length=0.08777432
        tendon_slack_length=0.02083695 pennation_angle_at_optimal=0.1745329
      PathPoint P1: pelvis (-0.03341333 0 -0.1607816)
      PathPoint P2: femur_l (0.004833996 -0.01450199 -0.05414075)
    DeGrooteFregly2016Muscle glmin2_l: max_isometric_force=394.8197 optimal_fiber_length=0.07359101
        tendon_slack_length=0.03429963 pennation_angle_at_optimal=0
      PathPoint P1: pelvis (-0.06860871 0.01113778 -0.1376182)
      PathPoint P2: femur_l (0.003867196 -0.008701192 -0.05027355)
    DeGrooteFregly2016Muscle glmin3_l: max_isometric_force=446.7738 optimal_fiber_length=0.03738425
        tendon_slack_length=0.04998687 pennation_angle_at_optimal=0.01745329
      PathPoint P1: pelvis (-0.08787706 -0.01726356 -0.108732)
      PathPoint P2: femur_l (-0.003867196 -0.0009667991 -0.04930675)
    DeGrooteFregly2016Muscle grac_l: max_isometric_force=281.3115 optimal_fiber_length=0.2167937
        tendon_slack_length=0.1637029 pennation_angle_at_optimal=0.1720016
      PathPoint P1: pelvis (-0.05274851 -0.1440337 -0.03346438)
      PathPoint P2: tibia_l (-0.01760829 -0.04545462 0.02830518)
      PathPoint P3: tibia_l (0.001701561 -0.06655206 0.01503683)
      PathWrap: wrap_object=GR_at_condyles_l method=hybrid
    DeGrooteFregly2016Muscle iliacus_l: max_isometric_force=1021.141 optimal_fiber_length=0.1149877
        tendon_slack_length=0.1036838 pennation_angle_at_optimal=0.279914
      PathPoint P1: pelvis (-0.06738355 0.03441573 -0.1148635)
      PathPoint P2: pelvis (-0.015036 -0.06203742 -0.1030092)
      PathPoint P3: femur_l (-0.002223638 -0.05462415 -0.01343851)
      PathPoint P4: femur_l (-0.01179495 -0.0615851 -0.01894926)
      PathWrap: wrap_object=IL_at_brim_l method=hybrid range=(2 3)
    DeGrooteFregly2016Muscle perbrev_l: max_isometric_force=521.2016 optimal_fiber_length=0.04296387
        tendon_slack_length=0.1396113 pennation_angle_at_optimal=0.2052361
      PathPoint P1: tibia_l (-0.02322917 -0.2420423 -0.02399392)
      PathPoint P2: tibia_l (-0.03240613 -0.3721447 -0.02380273)
      PathPoint P3: tibia_l (-0.02724409 -0.3827556 -0.02437629)
      PathPoint P4: calcn_l (0.04274881 0.02450568 -0.0211475)
      PathPoint P5: calcn_l (0.06144574 0.01987683 -0.0311313)
    DeGrooteFregly2016Muscle perlong_l: max_isometric_force=1115.371 optimal_fiber_length=0.04781241
        tendon_slack_length=0.3126826 pennation_angle_at_optimal=0.2479525
      PathPoint P1: tibia_l (-0.01911866 -0.1312496 -0.02695731)
      PathPoint P2: tibia_l (-0.03030308 -0.3728139 -0.02265561)
      PathPoint P3: tibia_l (-0.02600138 -0.3837115 -0.02294239)
      PathPoint P4: calcn_l (0.03975367 0.02087521 -0.02005836)
      PathPoint P5: calcn_l (0.06180878 0.00962075 -0.02577635)
      PathPoint P6: calcn_l (0.07732905 0.006262564 -0.01070989)
      PathPoint P7: calcn_l (0.1091864 0.007714753 0.01670017)
    DeGrooteFregly2016Muscle piri_l: max_isometric_force=1029.787 optimal_fiber_length=0.03076002
        tendon_slack_length=0.135943 pennation_angle_at_optimal=0.1745329
      PathPoint P1: pelvis (-0.1133937 -0.007272969 -0.01840813)
      PathPoint P2: pelvis (-0.1136276 -0.03414843 -0.08300692)
      PathPoint P3: femur_l (-0.01430863 -0.003480477 -0.04224912)
    DeGrooteFregly2016Muscle psoas_l: max_isometric_force=1426.79 optimal_fiber_length=0.1273796
        tendon_slack_length=0.1084668 pennation_angle_at_optimal=0.2155251
      PathPoint P1: pelvis (-0.06749493 0.06905422 -0.05313969)
      PathPoint P2: pelvis (-0.02283244 -0.07284107 -0.08938369)
      PathPoint P3: femur_l (-0.01276175 -0.04514952 -0.004447276)
      PathPoint P4: femur_l (-0.02271978 -0.05066027 -0.008507832)
      PathWrap: wrap_object=PS_at_brim_l method=hybrid range=(2 3)
    DeGrooteFregly2016Muscle recfem_l: max_isometric_force=2191.741 optimal_fiber_length=0.07417392
        tendon_slack_length=0.4401592 pennation_angle_at_optimal=0.2170149
      PathPoint P1: pelvis (-0.02673067 -0.04321458 -0.1271265)
      PathPoint P2: patella_l (0.009667991 0.04737316 -0.0006767594)
      PathPoint P3: patella_l (0.01169827 0.04224912 0.0009667991)
      PathPoint P4: patella_l (0.004833996 0.002387994 -2.900397e-5)
      PathPoint P5: tibia_l (0.03116342 -0.0603385 0.0004492885)
      PathWrap: wrap_object=KnExt_at_fem_l method=hybrid
    DeGrooteFregly2016Muscle sart_l: max_isometric_force=249.4131 optimal_fiber_length=0.396784
        tendon_slack_length=0.1220872 pennation_angle_at_optimal=0.02613542
      PathPoint P1: pelvis (-0.02171867 -0.01737493 -0.1438859)
      PathPoint P2: femur_l (-0.002900397 -0.3449539 0.04070224)
      PathPoint P3: tibia_l (-0.02399392 -0.03833292 0.03489156)
      PathPoint P4: tibia_l (-0.01519934 -0.05726039 0.02523663)
      PathPoint P5: tibia_l (0.01300069 -0.07743058 0.002485426)
    DeGrooteFregly2016Muscle semimem_l: max_isometric_force=2200.987 optimal_fiber_length=0.08202227
        tendon_slack_length=0.3195053 pennation_angle_at_optimal=0.2545615
      PathPoint P1: pelvis (-0.1099299 -0.1269707 -0.08366095)
      PathPoint P2: tibia_l (-0.02581019 -0.03919326 0.01873629)
      PathWrap: wrap_object=SM_at_condyles_l method=hybrid
    DeGrooteFregly2016Muscle semiten_l: max_isometric_force=591.2951 optimal_fiber_length=0.1834451
        tendon_slack_length=0.2349609 pennation_angle_at_optimal=0.241295
      PathPoint P1: pelvis (-0.1156101 -0.1395564 -0.07017164)
      PathPoint P2: tibia_l (-0.02982511 -0.0485614 0.02189087)
      PathPoint P3: tibia_l (0.001816273 -0.07389363 0.01118442)
      PathWrap: wrap_object=ST_at_condyles_l method=hybrid
    DeGrooteFregly2016Muscle soleus_l: max_isometric_force=6194.843 optimal_fiber_length=0.04194871
        tendon_slack_length=0.2682334 pennation_angle_at_optimal=0.3814289
      PathPoint P1: tibia_l (-0.007265091 -0.08756347 -0.009368144)
      PathPoint P2: calcn_l (0.003993519 0.02813616 0.004810375)
    DeGrooteFregly2016Muscle tfl_l: max_isometric_force=411.2066 optimal_fiber_length=0.09234142
        tendon_slack_length=0.4369241 pennation_angle_at_optimal=0.05235988
      PathPoint P1: pelvis (-0.02227556 0.01225156 -0.1757698)
      PathPoint P2: femur_l (0.02842389 -0.09619651 -0.05771791)
      PathPoint P3: femur_l (0.01034475 -0.3915536 -0.03132429)
      PathPoint P4: tibia_l (0.01032408 -0.03919326 -0.03307528)
    DeGrooteFregly2016Muscle tibant_l: max_isometric_force=1227.452 optimal_fiber_length=0.0646749
        tendon_slack_length=0.2276983 pennation_angle_at_optimal=0.1951828
      PathPoint P1: tibia_l (0.01472137 -0.1254184 -0.01548612)
      PathPoint P2: tibia_l (0.02399392 -0.1822008 -0.01223594)
      PathPoint P3: tibia_l (0.02227324 -0.3497759 0.01261832)
      PathPoint P4: calcn_l (0.1058283 0.0161556 0.02768235)
    DeGrooteFregly2016Muscle tibpost_l: max_isometric_force=1730.154 optimal_fiber_length=0.03585173
        tendon_slack_length=0.2663078 pennation_angle_at_optimal=0.2264891
      PathPoint P1: tibia_l (-0.003919326 -0.1246537 -0.009846111)
      PathPoint P2: tibia_l (-0.0156773 -0.3493935 0.01672883)
      PathPoint P3: calcn_l (0.03784767 0.03031444 0.02595787)
      PathPoint P4: calcn_l (0.07006811 0.01443113 0.02550406)
    DeGrooteFregly2016Muscle vasint_l: max_isometric_force=1697.361 optimal_fiber_length=0.1129004
        tendon_slack_length=0.197817 pennation_angle_at_optimal=0.06309973
      PathPoint P1: femur_l (0.02803717 -0.1860121 -0.02997077)
      PathPoint P2: femur_l (0.03238777 -0.2014809 -0.02755377)
      PathPoint P3: patella_l (0.005607435 0.04640636 0.0005800795)
      PathPoint P4: patella_l (0.004833996 0.002387994 0.0003770517)
      PathPoint P5: tibia_l (0.03113474 -0.06041497 -0.0004110512)
      PathWrap: wrap_object=KnExt_at_fem_l method=hybrid
    DeGrooteFregly2016Muscle vaslat_l: max_isometric_force=5148.767 optimal_fiber_length=0.112911
        tendon_slack_length=0.2132764 pennation_angle_at_optimal=0.2528673
      PathPoint P1: femur_l (0.004640636 -0.1792446 -0.03374129)
      PathPoint P2: femur_l (0.0260069 -0.2504976 -0.03954208)
      PathPoint P3: patella_l (0.009958031 0.0408956 -0.01363187)
      PathPoint P4: patella_l (0.004833996 0.002387994 -0.007086637)
      PathPoint P5: tibia_l (0.03110606 -0.06058704 -0.004884818)
      PathWrap: wrap_object=KnExtVL_at_fem_l method=hybrid
    DeGrooteFregly2016Muscle vasmed_l: max_isometric_force=2747.823 optimal_fiber_length=0.1061377
        tendon_slack_length=0.2006967 pennation_angle_at_optimal=0.4222225
      PathPoint P1: femur_l (0.01353519 -0.2029311 -0.01817582)
      PathPoint P2: femur_l (0.03441805 -0.2677067 -0.0008701192)
      PathPoint P3: patella_l (0.006090834 0.04302256 0.01643558)
      PathPoint P4: patella_l (0.004833996 0.002387994 0.008217792)
      PathPoint P5: tibia_l (0.03049426 -0.06076867 0.006481226)
      PathWrap: wrap_object=KnExt_at_fem_l method=hybrid
    CoordinateActuator reserve_jointset_ground_pelvis_pelvis_tilt: coordinate=pelvis_tilt optimal_force=10
    CoordinateActuator reserve_jointset_ground_pelvis_pelvis_list: coordinate=pelvis_list optimal_force=10
    CoordinateActuator reserve_jointset_ground_pelvis_pelvis_rotation: coordinate=pelvis_rotation optimal_force=10
    CoordinateActuator reserve_jointset_ground_pelvis_pelvis_tx: coordinate=pelvis_tx optimal_force=10
    CoordinateActuator reserve_jointset_ground_pelvis_pelvis_ty: coordinate=pelvis_ty optimal_force=10
    CoordinateActuator reserve_jointset_ground_pelvis_pelvis_tz: coordinate=pelvis_tz optimal_force=10
    CoordinateActuator reserve_jointset_hip_r_hip_flexion_r: coordinate=hip_flexion_r optimal_force=10
    CoordinateActuator reserve_jointset_hip_r_hip_adduction_r: coordinate=hip_adduction_r optimal_force=10
    CoordinateActuator reserve_jointset_hip_r_hip_rotation_r: coordinate=hip_rotation_r optimal_force=10
    CoordinateActuator reserve_jointset_walker_knee_r_knee_angle_r: coordinate=knee_angle_r optimal_force=10
    CoordinateActuator reserve_jointset_ankle_r_ankle_angle_r: coordinate=ankle_angle_r optimal_force=10
    CoordinateActuator reserve_jointset_subtalar_r_subtalar_angle_r: coordinate=subtalar_angle_r optimal_force=10
    CoordinateActuator reserve_jointset_mtp_r_mtp_angle_r: coordinate=mtp_angle_r optimal_force=10
    CoordinateActuator reserve_jointset_hip_l_hip_flexion_l: coordinate=hip_flexion_l optimal_force=10
    CoordinateActuator reserve_jointset_hip_l_hip_adduction_l: coordinate=hip_adduction_l optimal_force=10
    CoordinateActuator reserve_jointset_hip_l_hip_rotation_l: coordinate=hip_rotation_l optimal_force=10
    CoordinateActuator reserve_jointset_walker_knee_l_knee_angle_l: coordinate=knee_angle_l optimal_force=10
    CoordinateActuator reserve_jointset_ankle_l_ankle_angle_l: coordinate=ankle_angle_l optimal_force=10
    CoordinateActuator reserve_jointset_subtalar_l_subtalar_angle_l: coordinate=subtalar_angle_l optimal_force=10
    CoordinateActuator reserve_jointset_mtp_l_mtp_angle_l: coordinate=mtp_angle_l optimal_force=10
    SmoothSphereHalfSpaceForce [values shared by the 14 below unless stated]: socket_half_space=/contactgeometryset/floor_sts
        stiffness=1000000 [N/m^2] dissipation=2 [s/m] static_friction=0.8 dynamic_friction=0.8 viscous_friction=0.5
        transition_velocity=0.2 [m/s]
    SmoothSphereHalfSpaceForce SmoothSphereHalfSpaceForce_s1_r: socket_sphere=/contactgeometryset/s1_r
    SmoothSphereHalfSpaceForce SmoothSphereHalfSpaceForce_s2_r: socket_sphere=/contactgeometryset/s2_r
    SmoothSphereHalfSpaceForce SmoothSphereHalfSpaceForce_s3_r: socket_sphere=/contactgeometryset/s3_r
    SmoothSphereHalfSpaceForce SmoothSphereHalfSpaceForce_s4_r: socket_sphere=/contactgeometryset/s4_r
    SmoothSphereHalfSpaceForce SmoothSphereHalfSpaceForce_s5_r: socket_sphere=/contactgeometryset/s5_r
    SmoothSphereHalfSpaceForce SmoothSphereHalfSpaceForce_s6_r: socket_sphere=/contactgeometryset/s6_r
    SmoothSphereHalfSpaceForce SmoothSphereHalfSpaceForce_s1_l: socket_sphere=/contactgeometryset/s1_l
    SmoothSphereHalfSpaceForce SmoothSphereHalfSpaceForce_s2_l: socket_sphere=/contactgeometryset/s2_l
    SmoothSphereHalfSpaceForce SmoothSphereHalfSpaceForce_s3_l: socket_sphere=/contactgeometryset/s3_l
    SmoothSphereHalfSpaceForce SmoothSphereHalfSpaceForce_s4_l: socket_sphere=/contactgeometryset/s4_l
    SmoothSphereHalfSpaceForce SmoothSphereHalfSpaceForce_s5_l: socket_sphere=/contactgeometryset/s5_l
    SmoothSphereHalfSpaceForce SmoothSphereHalfSpaceForce_s6_l: socket_sphere=/contactgeometryset/s6_l
    SmoothSphereHalfSpaceForce SmoothSphereHalfSpaceForce_s8_l: socket_sphere=/contactgeometryset/s8_l
        socket_half_space=/contactgeometryset/chair
    SmoothSphereHalfSpaceForce SmoothSphereHalfSpaceForce_s8_r: socket_sphere=/contactgeometryset/s8_r
        socket_half_space=/contactgeometryset/chair
    ObjectGroup right_leg
    ObjectGroup left_leg
    ObjectGroup hip_add_r
    ObjectGroup hip_abd_r
    ObjectGroup hip_flex_r
    ObjectGroup hip_ext_r
    ObjectGroup hip_inrot_r
    ObjectGroup hip_exrot_r
    ObjectGroup knee_flex_r
    ObjectGroup knee_ext_r
    ObjectGroup ankle_df_r
    ObjectGroup ankle_pf_r
    ObjectGroup everter_r
    ObjectGroup inverter_r
    ObjectGroup hip_add_l
    ObjectGroup hip_abd_l
    ObjectGroup hip_flex_l
    ObjectGroup hip_ext_l
    ObjectGroup hip_exrot_l
    ObjectGroup hip_inrot_l
    ObjectGroup knee_flex_l
    ObjectGroup knee_ext_l
    ObjectGroup ankle_df_l
    ObjectGroup ankle_pf_l
    ObjectGroup everter_l
    ObjectGroup inverter_l
  MarkerSet:
    Marker r.ASIS_study: pelvis (0.0113821 0.01341966 0.1749325)
    Marker L.ASIS_study: pelvis (0.01543196 0.01532203 -0.1736952)
    Marker r.PSIS_study: pelvis (-0.1819021 0.01656711 0.07157139)
    Marker L.PSIS_study: pelvis (-0.1791956 0.0165 -0.06457546)
    Marker r_knee_study: femur_r (0.01694813 -0.3840552 0.06091055)
    Marker r_mknee_study: femur_r (0.03187084 -0.3816899 -0.05437004)
    Marker r_ankle_study: tibia_r (-0.03106658 -0.3674783 0.04623981)
    Marker r_mankle_study: tibia_r (-0.002992212 -0.364663 -0.03159806)
    Marker r_toe_study: calcn_r (0.170795 0.01878988 0.005687991)
    Marker r_5meta_study: calcn_r (0.1304085 0.0138559 0.05391038)
    Marker r_calc_study: calcn_r (-0.03284445 0.03986617 -0.004839764)
    Marker L_knee_study: femur_l (0.01715676 -0.384412 -0.06522116)
    Marker L_mknee_study: femur_l (0.03208386 -0.3814013 0.04977006)
    Marker L_ankle_study: tibia_l (-0.02546753 -0.3591295 -0.0455776)
    Marker L_mankle_study: tibia_l (0.00182154 -0.3561448 0.0315248)
    Marker L_toe_study: calcn_l (0.170688 0.02332072 -0.006115108)
    Marker L_calc_study: calcn_l (-0.02632274 0.03833108 0.008565784)
    Marker L_5meta_study: calcn_l (0.1291847 0.01518647 -0.05113813)
    Marker r_shoulder_study: torso (0.03715882 0.3498972 0.1522205)
    Marker L_shoulder_study: torso (0.01191262 0.354045 -0.1617761)
    Marker C7_study: torso (-0.06616537 0.3657938 0.003818159)
    Marker r_lelbow_study: humerus_r (0.01451953 -0.2710313 0.03871875) fixed=true
    Marker r_melbow_study: humerus_r (0.00217793 -0.2768391 -0.04839844) fixed=true
    Marker r_lwrist_study: radius_r (0.0004806513 -0.2162931 0.04806513) fixed=true
    Marker r_mwrist_study: radius_r (-0.02114866 -0.2162931 -0.02114866) fixed=true
    Marker L_lelbow_study: humerus_l (0.01451953 -0.2710313 -0.03871875) fixed=true
    Marker L_melbow_study: humerus_l (0.00217793 -0.2768391 0.04839844) fixed=true
    Marker L_lwrist_study: radius_l (0.0004806513 -0.2162931 -0.04806513) fixed=true
    Marker L_mwrist_study: radius_l (-0.02114866 -0.2162931 0.02114866) fixed=true
    Marker r_thigh1_study: femur_r (0.08430296 -0.1359402 0.08407288)
    Marker r_thigh2_study: femur_r (0.05259152 -0.2340487 0.09705414)
    Marker r_thigh3_study: femur_r (-0.03282605 -0.1317485 0.1026488)
    Marker L_thigh1_study: femur_l (0.07848895 -0.1318058 -0.08770146)
    Marker L_thigh2_study: femur_l (0.04972768 -0.2311209 -0.1007719)
    Marker L_thigh3_study: femur_l (-0.0306935 -0.1324584 -0.104835)
    Marker r_sh1_study: tibia_r (-0.001895794 -0.1027896 0.06307832)
    Marker r_sh2_study: tibia_r (0.01234475 -0.2167681 0.07249033)
    Marker r_sh3_study: tibia_r (-0.04839894 -0.2041541 0.06816445)
    Marker L_sh1_study: tibia_l (0.002459676 -0.1010912 -0.06413223)
    Marker L_sh2_study: tibia_l (0.01629068 -0.2127462 -0.07342678)
    Marker L_sh3_study: tibia_l (-0.04346434 -0.1994148 -0.06824404)
    Marker RHJC_study: pelvis (-0.0731726 -0.08459894 0.1033797)
    Marker LHJC_study: pelvis (-0.07090862 -0.08353753 -0.1071476)
  ContactGeometrySet:
    ContactHalfSpace floor_sts: socket_frame=/ground location=(0.696 -0.028 0) orientation=(0 0 -1.570796)
    ContactHalfSpace chair: socket_frame=/ground location=(0.196 0.425 0) orientation=(0 0 -1.570796)
    ContactSphere s1_r: socket_frame=/bodyset/calcn_r location=(0.00188804 -0.01 -0.003799902) radius=0.032
    ContactSphere s2_r: socket_frame=/bodyset/calcn_r location=(0.1473625 -0.01 -0.0285153) radius=0.032
    ContactSphere s3_r: socket_frame=/bodyset/calcn_r location=(0.1320835 -0.01 0.05127996) radius=0.032
    ContactSphere s4_r: socket_frame=/bodyset/calcn_r location=(0.06577765 -0.01 0.02618225) radius=0.032
    ContactSphere s5_r: socket_frame=/bodyset/toes_r location=(0.059586 -0.01 -0.01863086) radius=0.032
    ContactSphere s6_r: socket_frame=/bodyset/toes_r location=(0.0446895 -0.01 0.06143015) radius=0.032
    ContactSphere s1_l: socket_frame=/bodyset/calcn_l location=(0.00188804 -0.01 0.003799902) radius=0.032
    ContactSphere s2_l: socket_frame=/bodyset/calcn_l location=(0.1473625 -0.01 0.0285153) radius=0.032
    ContactSphere s3_l: socket_frame=/bodyset/calcn_l location=(0.1320835 -0.01 -0.05127996) radius=0.032
    ContactSphere s4_l: socket_frame=/bodyset/calcn_l location=(0.06577765 -0.01 -0.02618225) radius=0.032
    ContactSphere s5_l: socket_frame=/bodyset/toes_l location=(0.059586 -0.01 0.01863086) radius=0.032
    ContactSphere s6_l: socket_frame=/bodyset/toes_l location=(0.0446895 -0.01 -0.06143015) radius=0.032
    ContactSphere s8_l: socket_frame=/bodyset/pelvis location=(-0.15 -0.08 -0.07) radius=0.1
    ContactSphere s8_r: socket_frame=/bodyset/pelvis location=(-0.15 -0.08 0.07) radius=0.1
