# OpenSim document version 40000
Model inverted_pendulum:
  gravity: 0 -9.81 0
  CoordinateActuator horizontal_force: min_control=-1 max_control=1 coordinate=position optimal_force=10
  Ground
  BodySet:
    Body: mass=2 [kg] mass_center=(0 0 0) inertia=(0 0 0 0 0 0)
      Brick body_geom_1: half_lengths=(0.1 0.05 0.05)
    Body bar: mass=0 mass_center=(0 0 0) inertia=(0 0 0 0 0 0)
      Cylinder bar_geom_1: radius=0.01 half_height=0.3
    Body pendulum: mass=1 mass_center=(0 0 0) inertia=(0 0 0 0 0 0)
      Sphere pendulum_geom_1: radius=0.05
  JointSet:
    SliderJoint cart: socket_parent_frame=/ground socket_child_frame=/bodyset/body
      Coordinate position
    PinJoint pin: socket_parent_frame=body_offset socket_child_frame=bar_offset
      Coordinate pin_coord_0
      PhysicalOffsetFrame body_offset: socket_parent=/bodyset/body translation=(0 0 0) [meters]
      PhysicalOffsetFrame bar_offset: socket_parent=/bodyset/bar translation=(0 -0.3 0)
    WeldJoint weld: socket_parent_frame=bar_offset socket_child_frame=pendulum_offset
      PhysicalOffsetFrame bar_offset: socket_parent=/bodyset/bar translation=(0 0.3 0)
      PhysicalOffsetFrame pendulum_offset: socket_parent=/bodyset/pendulum translation=(0 0 0)
